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# Bearing Sizing
# Spindle Shaft Characteristics
# Applied Forces
F_feed_z_finish := 50 N
F_feed_z_rough := 200 N
F_cut_x := 10 N
F_cut_y := 115 N
# Rotational Speed | Geometry Between Bearings
N_rot := 700 rpm
D_bc := 19 mm
L_cd := 50 mm
# Young's Modulus | Shaft Stiffness
E_s := 210 GPa
K_s := π*(D_bc/2)^2*E_s/L_cd = 1190.82 N/μm
# Allowable Deflection
δ_z := 10 μm
# Spindle Housing Characteristics
# Outer Diameter | Inner Diameter | Total Length
D_h_outer := 72 mm
D_h_inner := 45 mm
L_h := 93 mm
# Young's Modulus | Housing Stiffness
E_h := 69 GPa
K_h := π*((D_h_outer/2)^2 - (D_h_inner/2)^2)*E_h/L_h = 1840.8 N/μm
# Washers Characteristics (Wave washer)
# Working Load | Deflection @ Working Load | Washer Stiffness
P_w := 50 lbf = 0.222411 kN
δ_w := 0.187 in
K_w := P_w/δ_w = 0.0468254 N/μm
# Number of washers
N_w := 5
# Bearing Parameters (LM11949 - LM11910, Tapered Roller Bearings)
# ISO factors | Bearing Stiffness
e := 0.30
Y_2 := 2
K_b_static := 53 N/μm
# Dynamic Radial Rating (1 million revolutions)
C_1 := 39100 N
# Constants for Bearing Stiffness
a_stiffness := 5.58 N/μm
b_stiffness := 17.7 N/μm
# Bolt Characteristics (M6)
# Pitch Diameter | Clamped Length | Young's Modulus
D_bolt_pitch := 5.35 mm
L_bolt := 10 mm
E_bolt := 210 GPa  # I assumed same bolt geometry on both ends of the spindle housing.
# Bolt Stiffness | Outer Diameter
D_bolt_outer := 6 mm
K_bolt := π*(D_bolt_pitch/2)^2*E_bolt/L_bolt = 472.081 N/μm
# Bolt Location Diameter
D_b := 63.5 mm
# Number of bolts
N_bolts_min := ceil(π*D_b/(6*D_bolt_outer)) = 6
N_bolts_max := floor(π*D_b/(3*D_bolt_outer)) = 11
N_bolts_back := 6  # Should be between the two values above.
N_bolts_front := 4
# Preload calculation V2
# System Stiffness
K_system := F_feed_z_finish/δ_z
# Bearing Stiffness
a := ((K_system - K_w)*(K_h + K_s) - K_h*K_s)/(K_h*K_s*K_w) = -21.2097 μm/N
b := ((K_h*K_s + K_w*(K_h + K_s))*K_system - 2*K_w*K_h*K_s)/(K_w*K_h*K_s) = 104.787
c := K_system
Δ := b^2 - 4*a*c = 11404.4
K_b :=
    if Δ > 0
        if (-b - sqrt(Δ))/(2*a) > 0
            (-b - sqrt(Δ))/(2*a)
        else
            (-b + sqrt(Δ))/(2*a)
    else if Δ == 0
        -b/(2*a)
    else
        0
    = 4.98778 N/μm
# Preload
F_preload_min := exp((K_b - b_stiffness)/a_stiffness)*1 N + F_feed_z_finish = 50.1025 N
# Bearing Forces
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# Preload
# Factor of Safety | Force
s := 2
F_preload := s*F_preload_min = 100.205 N
# Loads during finishing pass
# Radial Load | Axial Load
F_r := sqrt(F_cut_x^2 + F_cut_y^2) = 115.434 N
F_a_finish := F_preload + F_feed_z_finish = 150.205 N
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# Dynamic Equivalent Radial Load
P_r_finish :=
    if F_a_finish/F_r ≤ e
        F_r
    else
        0.4*F_r + Y_2*F_a_finish
# Loads during finishing pass
# Radial Load | Axial Load
F_r := sqrt(F_cut_x^2 + F_cut_y^2) = 115.434 N
F_a_rough := F_preload + F_feed_z_rough = 300.205 N
# Dynamic Equivalent Radial Load
P_r_rough :=
    if F_a_finish/F_r ≤ e
        F_r
    else
        0.4*F_r + Y_2*F_a_rough
# Bearing Life
P_r_average := (P_r_finish + P_r_rough)/2
L_10 := (C_1/P_r_average)^(10/3)*(10^6/(60*N_rot)) = 132140 hr
