# Metalworking Spindle Pulley Characteristics
# Rotational Speed
N_metal := 900 rpm
# Pulley Diameter | Center Distance from Motor Pulley
D_metal := 3*1*in = 7.62 cm
L_motor_metal := 9.3345 cm
# Woodworking Spindle Pulley Characteristics
# Rotational Speed
N_wood := 4000 rpm
# Pulley Diameter | Center Distance from Motor Pulley
D_wood := 2.54 cm
L_motor_wood := 9.3345 cm
# Motor Pulley Characteristics
# Power | Pulley Diameter
P_motor := 300 W
D_motor := 2.54 cm
# Rotational Speeds
N_motor_metal := N_metal*D_metal/D_motor = 2700 rpm
N_motor_wood := N_wood*D_wood/D_motor
# Belt Characteristics (not dependent on shape)
# Angle of Contact of the belt
# For Metal | For Wood
θ_motor_metal := π - 2*asin((D_metal - D_motor)/(2*L_motor_metal))
θ_motor_wood := π - 2*asin((D_wood - D_motor)/(2*L_motor_wood))
θ_metal := π + 2*asin((D_metal - D_motor)/(2*L_motor_metal))
θ_wood := π + 2*asin((D_wood - D_motor)/(2*L_motor_wood))
# Length of the belt
# For Metal
L_belt_metal := sqrt(4*L_motor_metal^2 - (D_metal - D_motor)^2) + 1/2*(D_metal*θ_metal + D_motor*θ_motor_metal)
L_belt_metal = 0.353238 m
# For Wood
L_belt_wood := sqrt(4*L_motor_wood^2 - (D_wood - D_motor)^2) + 1/2*(D_wood*θ_wood + D_motor*θ_motor_wood)
L_belt_wood = 0.266486 m
# Flat Belt
# Characteristics
# Coefficient of Friction | Efficiency
f_flat := 0.6/sin(1/4)
η_flat := 0.8
# Output Torques
# For Metal | For Wood
T_wood := P_motor*η_flat/N_wood
T_metal := P_motor*η_flat/N_metal = 2.54648 N*m
# Pre-tension
# For Metal
F_i_metal := T_metal/D_metal*(exp(f_flat*θ_metal) + 1)/(exp(f_flat*θ_metal) - 1)
F_i_metal = 33.427 N
F_i_motor_metal := P_motor/(N_motor_metal*D_motor)*(exp(f_flat*θ_motor_metal) + 1)/(exp(f_flat*θ_motor_metal) - 1) = 41.9294 N
# For Wood
F_i_wood := T_wood/D_wood*(exp(f_flat*θ_wood) + 1)/(exp(f_flat*θ_wood) - 1)
F_i_wood = 22.5796 N
F_i_motor_wood := P_motor/(N_motor_wood*D_motor)*(exp(f_flat*θ_motor_wood) + 1)/(exp(f_flat*θ_motor_wood) - 1) = 28.2244 N
# Loading Motor Tension
b := .5*in
h := .055*in
ρ := 1250*kg/m^3
g = 9.80665 m/s^2
w := ρ*b*h = 0.0221774 kg/m
F_c_wood_motor := w*(π*D_motor*N_motor_wood)^2 = 24.7773 N
F_c_metal_motor := w*(π*D_motor*N_motor_metal)^2 = 11.2892 N
F_c_metal_spindle := w*(π*D_metal*N_metal)^2 = 11.2892 N
F_load_on_metal_motor := 2*F_i_motor_metal + 2*F_c_metal_motor = 106.437 N
F_load_on_wood_motor := 2*F_i_motor_wood + 2*F_c_wood_motor = 106.004 N
# Will Our Belt Die?
F_a := 9.8 lbf/in
C_v := 1
C_p := 1
Ratio_of_Pulley_Speed_To_Belt_Length := N_motor_metal/L_belt_metal = 14638.3 1/(ft*min)
F_1a := b*F_a*C_p*C_v = 21.7963 N
F1 := F_c_metal_motor + F_i_motor_metal*2*exp(f_flat*θ_motor_metal)/(exp(f_flat*θ_motor_metal) + 1) = 94.9915 N
# Round Belt
# V-Belt
# Timing Belt
