# Spindle Calculations
pi := 3.14159
# Assumptions:
# - Fixed Bearings
# - Perfect Turning about Z
# General Notes: 3/6/2023
# - The bearing load might not be in the center of BC and DE, ask
# - Ask about where to set the origin
# Applied Forces
F_cut_x := 90 N
F_cut_y := 100 N
F_feed_z := 400 N
F_t := 1 N
F_preload := 1 N
D_part := 2.5 cm
L_part := 5 cm
# L_part is the length of the part from the end of the chuck
M_resist := F_preload*0 m
# Spindle Shaft Dimensions
R_spindle_ab := 1 cm
L_ef := 2.35 cm
L_de := 1.66 cm
L_cd := 3 cm
L_bc := 1.66 cm
L_ab := 3.17 cm
R_spindle_fg := 1 cm
R_spindle_be := 1 cm
D_ef := 1.4 cm
D_de := 1.9 cm
D_cd := 10 cm
D_bc := 1.9 cm
D_ab := 1.9 cm
R_spindle_ef := 1 cm
L_total := L_ef + L_de + L_cd + L_bc + L_ab
L_a := L_ab + L_bc/2
L_b := L_ab + L_bc + L_cd + L_de/2
# Calculate Bearing Forces
R_a_y := (F_cut_y*(L_total - L_a) - F_t*L_a)/(L_b - L_a) - F_t - F_cut_y
R_b_y := -(F_cut_y*(L_total - L_a) - F_t*L_a)/(L_b - L_a)
R_a_x := (F_cut_x*(L_total - L_a) + F_cut_y*L_part)/(L_b - L_a) - F_cut_x
R_b_x := -(F_cut_x*(L_total - L_a) + F_cut_y*L_part)/(L_b - L_a)
R_a_z := F_feed_z
M_mot := F_cut_y*D_part/2 + M_resist
# Material Properties - 12L14
E := 200 GPa
E_part := 200 GPa
G := 80 GPa
G_part := 80 GPa
# HTMS - FP
I_fp := pi*D_part^4/64
J_fp := pi*D_part^4/32
A_fp := pi*D_part^2/2
U_S := [1, 0, 0, 0; 0, 1, 0, 0; 0, 0, 1, 0; 0*m^-1, 0 m^-1, 0 m^-1, 1 m^-1]
R_z_fp := [
    1, -(F_cut_y*D_part/2*L_part/(J_fp*G_part)), 0, 0*m;
    F_cut_y*D_part/2*L_part/(J_fp*G_part), 1, 0, 0*m;
    0, 0, 1, 0*m;
    0, 0, 0, 1*m
]
R_x_fp := [
    1, 0, 0, 0*m;
    0, 1, -(F_cut_y*L_part^2/(2*E_part*I_fp)), 0*m;
    0, F_cut_y*L_part^2/(2*E_part*I_fp), 1, 0*m;
    0, 0, 0, 1*m
] = [1, 0, 0, 0 m; 0, 1, -3.2595e-5, 0 m; 0, 3.2595e-5, 1, 0 m; 0, 0, 0, 1 m]
R_y_fp := [
    1, 0, F_cut_x*L_part^2/(2*E_part*I_fp), 0*m;
    0, 1, 0, 0*m;
    -(F_cut_x*L_part^2/(2*E_part*I_fp)), 0, 1, 0*m;
    0, 0, 0, 1*m
]
T_z_fp := [1, 0, 0, 0*m; 0, 1, 0, 0*m; 0, 0, 1, -F_feed_z*L_part/(E_part*A_fp); 0, 0, 0, 1*m] = [1, 0, 0, 0 m; 0, 1, 0, 0 m; 0, 0, 1, -1.01859e-7 m; 0, 0, 0, 1 m]
T_y_fp := [1, 0, 0, 0*m; 0, 1, 0, F_cut_y*L_part^3/(3*E_part*I_fp); 0, 0, 1, 0*m; 0, 0, 0, 1*m]
T_x_fp := [1, 0, 0, F_cut_x*L_part^3/(3*E_part*I_fp); 0, 1, 0, 0*m; 0, 0, 1, 0*m; 0, 0, 0, 1*m]
T_n_fp := [1, 0, 0, 0 m; 0, 1, 0, 0 m; 0, 0, 1, -L_part; 0, 0, 0, 1*m]
T_fp := (U_S*T_n_fp)*U_S*T_x_fp*U_S*T_y_fp*U_S*T_z_fp
R_fp := (U_S*R_x_fp)*(U_S*R_y_fp)*(U_S*R_z_fp)
H_fp := T_fp*R_fp
# Segment EF
I_ef := pi*D_ef^4/64
J_ef := pi*D_ef^4/32
A_ef := pi*D_ef^2/2
F_x_ef := F_cut_x
F_z_ef := F_feed_z
F_y_ef := F_cut_y
M_z_ef := F_cut_y*D_part/2
M_y_ef := F_cut_x*L_part
M_x_ef := F_cut_y*L_part
T_z_ef := [1, 0, 0, 0*m; 0, 1, 0, 0*m; 0, 0, 1, F_feed_z*L_ef/(A_ef*E); 0, 0, 0, 1*m]
T_y_ef := [
    1, 0, 0, 0*m;
    0, 1, 0, M_x_ef*L_ef^2/(2*E*I_ef) + F_y_ef*L_ef^3/(3*E*I_ef);
    0, 0, 1, 0*m;
    0, 0, 0, 1*m
]
T_x_ef := [
    1, 0, 0, M_y_ef*L_ef^2/(2*E*I_ef) + F_x_ef*L_ef^3/(3*E*I_ef);
    0, 1, 0, 0*m;
    0, 0, 1, 0*m;
    0, 0, 0, 1*m
]
T_n_ef := [1, 0, 0, 0*m; 0, 1, 0, 0*m; 0, 0, 1, L_ef; 0, 0, 0, 1*m]
R_z_ef := [1, -(M_z_ef*L_ef/(J_ef*G)), 0, 0*m; M_z_ef*L_ef/(J_ef*G), 1, 0, 0*m; 0, 0, 1, 0*m; 0, 0, 0, 1*m]
R_x_ef := [
    1, 0, 0, 0*m;
    0, 1, -(M_y_ef*L_ef/(E*I_ef) + F_x_ef*L_ef^2/(2*E*I_ef)), 0*m;
    0, M_y_ef*L_ef/(E*I_ef) + F_x_ef*L_ef^2/(2*E*I_ef), 1, 0*m;
    0, 0, 0, 1*m
]
R_y_ef := [
    1, 0, M_x_ef*L_ef/(E*I_ef) + F_y_ef*L_ef^2/(2*E*I_ef), 0*m;
    0, 1, 0, 0*m;
    -(M_x_ef*L_ef/(E*I_ef) + F_y_ef*L_ef^2/(2*E*I_ef)), 0, 1, 0*m;
    0, 0, 0, 1*m
]
T_ef := U_S*T_n_ef*U_S*T_x_ef*U_S*T_y_ef*U_S*T_z_ef
R_ef := U_S*R_x_ef*U_S*R_y_ef*U_S*R_z_ef
H_ef := T_ef*R_ef
# Segment DE
I_de := pi*D_de^4/64
J_de := pi*D_de^4/32
A_de := pi*D_de^2/2
F_x_de := F_cut_x
F_z_de := F_feed_z
F_y_de := F_cut_y
M_z_de := F_cut_y*D_part/2
M_y_de := F_cut_x*(L_part + L_ef)
M_x_de := F_cut_y*(L_part + L_ef)
T_z_de := [1, 0, 0, 0*m; 0, 1, 0, 0*m; 0, 0, 1, F_z_de*L_de/(A_de*E); 0, 0, 0, 1*m]
T_y_de := [
    1, 0, 0, 0*m;
    0, 1, 0, M_x_de*L_de^2/(2*E*I_de) + F_y_de*L_de^3/(3*E*I_de) + 5*R_b_y*(L_de/2)^3/(2*3*E*I_de);
    0, 0, 1, 0*m;
    0, 0, 0, 1*m
]
T_x_de := [
    1, 0, 0, M_y_de*L_de^2/(2*E*I_de) + F_x_de*L_de^3/(3*E*I_de) + 5*R_b_x*(L_de/2)^3/(2*3*E*I_de);
    0, 1, 0, 0*m;
    0, 0, 1, 0*m;
    0, 0, 0, 1*m
]
T_n_de := [1, 0, 0, 0*m; 0, 1, 0, 0*m; 0, 0, 1, L_de; 0, 0, 0, 1*m]
R_z_de := [1, -(M_z_de*L_de/(J_de*G)), 0, 0*m; M_z_de*L_de/(J_de*G), 1, 0, 0*m; 0, 0, 1, 0*m; 0, 0, 0, 1*m]
R_x_de := [
    1, 0, 0, 0*m;
    0, 1, -(M_y_de*L_de/(E*I_de) + F_x_de*L_de^2/(2*E*I_de) + R_b_x*(L_de/2)^2/(2*E*I_de)), 0*m;
    0, M_y_de*L_de/(E*I_de) + F_x_de*L_de^2/(2*E*I_de) + R_b_x*(L_de/2)^2/(2*E*I_de), 1, 0*m;
    0, 0, 0, 1*m
]
R_y_de := [
    1, 0, M_x_de*L_de/(E*I_de) + F_y_de*L_de^2/(2*E*I_de) + R_b_y*(L_de/2)^2/(2*E*I_de), 0*m;
    0, 1, 0, 0*m;
    -(M_x_de*L_de/(E*I_de) + F_y_de*L_de^2/(2*E*I_de) + R_b_y*(L_de/2)^2/(2*E*I_de)), 0, 1, 0*m;
    0, 0, 0, 1*m
]
T_de := U_S*T_n_de*U_S*T_x_de*U_S*T_y_de*U_S*T_z_de
R_de := U_S*R_x_de*U_S*R_y_de*U_S*R_z_de
H_de := T_de*R_de
# Segment CD
I_cd := pi*D_cd^4/64
J_cd := pi*D_cd^4/32
A_cd := pi*D_cd^2/2
F_x_cd := F_cut_x + R_b_x
F_z_cd := F_feed_z
F_y_cd := F_cut_y + R_b_y
M_z_cd := F_cut_y*D_part/2
M_y_cd := F_cut_x*(L_part + L_ef + L_de) + R_b_x*L_de/2
M_x_cd := F_cut_y*(L_part + L_ef + L_de) + R_b_y*L_de/2
T_z_cd := [1, 0, 0, 0*m; 0, 1, 0, 0*m; 0, 0, 1, F_z_cd*L_cd/(A_cd*E); 0, 0, 0, 1*m]
T_y_cd := [
    1, 0, 0, 0*m;
    0, 1, 0, M_x_cd*L_cd^2/(2*E*I_cd) + F_y_cd*L_cd^3/(3*E*I_cd);
    0, 0, 1, 0*m;
    0, 0, 0, 1*m
]
T_x_cd := [
    1, 0, 0, M_y_cd*L_cd^2/(2*E*I_cd) + F_x_cd*L_cd^3/(3*E*I_cd);
    0, 1, 0, 0*m;
    0, 0, 1, 0*m;
    0, 0, 0, 1*m
]
T_n_cd := [1, 0, 0, 0*m; 0, 1, 0, 0*m; 0, 0, 1, L_cd; 0, 0, 0, 1*m]
R_z_cd := [1, -(M_z_cd*L_cd/(J_cd*G)), 0, 0*m; M_z_cd*L_cd/(J_cd*G), 1, 0, 0*m; 0, 0, 1, 0*m; 0, 0, 0, 1*m]
R_x_cd := [
    1, 0, 0, 0*m;
    0, 1, -(M_y_cd*L_cd/(E*I_cd) + F_x_cd*L_cd^2/(2*E*I_cd)), 0*m;
    0, M_y_cd*L_cd/(E*I_cd) + F_x_cd*L_cd^2/(2*E*I_cd), 1, 0*m;
    0, 0, 0, 1*m
]
R_y_cd := [
    1, 0, M_x_cd*L_cd/(E*I_cd) + F_y_cd*L_cd^2/(2*E*I_cd), 0*m;
    0, 1, 0, 0*m;
    -(M_x_cd*L_cd/(E*I_cd) + F_y_cd*L_cd^2/(2*E*I_cd)), 0, 1, 0*m;
    0, 0, 0, 1*m
]
T_cd := U_S*T_n_cd*U_S*T_x_cd*U_S*T_y_cd*U_S*T_z_cd
R_cd := U_S*R_x_cd*U_S*R_y_cd*U_S*R_z_cd
H_cd := T_cd*R_cd
# Segment BC
I_bc := pi*D_bc^4/64
J_bc := pi*D_bc^4/32
A_bc := pi*D_bc^2/2
F_x_bc := F_cut_x + R_b_x
F_z_bc := F_feed_z
F_y_bc := F_cut_y + R_b_y
M_z_bc := F_cut_y*D_part/2
M_y_bc := F_cut_x*(L_part + L_ef + L_de + L_cd) + R_b_x*(L_de/2 + L_cd)
M_x_bc := F_cut_y*(L_part + L_ef + L_de + L_cd) + R_b_y*(L_de/2 + L_cd)
T_z_bc := [1, 0, 0, 0*m; 0, 1, 0, 0*m; 0, 0, 1, F_z_bc*L_bc/(A_bc*E) - R_a_z*(L_bc/2)/(A_bc*E); 0, 0, 0, 1*m]
T_y_bc := [
    1, 0, 0, 0*m;
    0, 1, 0, M_x_bc*L_bc^2/(2*E*I_bc) + F_y_bc*L_bc^3/(3*E*I_bc) + 5*R_a_y*(L_bc/2)^3/(2*3*E*I_bc);
    0, 0, 1, 0*m;
    0, 0, 0, 1*m
]
T_x_bc := [
    1, 0, 0, M_y_bc*L_bc^2/(2*E*I_bc) + F_x_bc*L_bc^3/(3*E*I_bc) + 5*R_a_x*(L_bc/2)^3/(2*3*E*I_bc);
    0, 1, 0, 0*m;
    0, 0, 1, 0*m;
    0, 0, 0, 1*m
]
T_n_bc := [1, 0, 0, 0*m; 0, 1, 0, 0*m; 0, 0, 1, L_bc; 0, 0, 0, 1*m]
R_z_bc := [1, -(M_z_bc*L_cd/(J_cd*G)), 0, 0*m; M_z_bc*L_cd/(J_cd*G), 1, 0, 0*m; 0, 0, 1, 0*m; 0, 0, 0, 1*m]
R_x_bc := [
    1, 0, 0, 0*m;
    0, 1, -(M_y_bc*L_bc/(E*I_bc) + F_x_bc*L_bc^2/(2*E*I_bc) + R_a_x*(L_bc/2)^2/(2*E*I_bc)), 0*m;
    0, M_y_bc*L_bc/(E*I_bc) + F_x_bc*L_bc^2/(2*E*I_bc) + R_a_x*(L_bc/2)^2/(2*E*I_bc), 1, 0*m;
    0, 0, 0, 1*m
] = [1, 0, 0, 0 m; 0, 1, 1.94517e-6, 0 m; 0, -1.94517e-6, 1, 0 m; 0, 0, 0, 1 m]
R_y_bc := [
    1, 0, M_x_bc*L_bc/(E*I_bc) + F_y_bc*L_bc^2/(2*E*I_bc) + R_a_y*(L_bc/2)^2/(2*E*I_bc), 0*m;
    0, 1, 0, 0*m;
    -(M_x_bc*L_bc/(E*I_bc) + F_y_bc*L_bc^2/(2*E*I_bc) + R_a_y*(L_bc/2)^2/(2*E*I_bc)), 0, 1, 0*m;
    0, 0, 0, 1*m
]
T_bc := U_S*T_n_bc*U_S*T_x_bc*U_S*T_y_bc*U_S*T_z_bc
R_bc := U_S*R_x_bc*U_S*R_y_bc*U_S*R_z_bc
H_bc := T_bc*R_bc
# Segment AB
I_ab := pi*D_ab^4/64
J_ab := pi*D_ab^4/32
A_ab := pi*D_ab^2/2
F_x_ab := F_cut_x + R_a_x + R_b_x
F_z_ab := F_feed_z + R_a_z
F_y_ab := F_cut_y + R_a_y + R_b_y
M_z_ab := F_cut_y*D_part/2
M_y_ab := F_cut_x*(L_part + L_ef + L_de + L_cd) + R_b_x*(L_de/2 + L_cd + L_bc) + R_a_x*(L_bc/2)
M_x_ab := F_cut_y*(L_part + L_ef + L_de + L_cd) + R_b_y*(L_de/2 + L_cd + L_bc) + R_a_y*(L_bc/2)
T_z_ab := [1, 0, 0, 0*m; 0, 1, 0, 0*m; 0, 0, 1, F_z_ab*L_ab/(A_ab*E); 0, 0, 0, 1*m]
T_y_ab := [
    1, 0, 0, 0*m;
    0, 1, 0, M_x_ab*L_ab^2/(2*E*I_ab) + F_y_ab*L_ab^3/(3*E*I_ab) + 5*F_t*(L_bc/2)^3/(2*3*E*I_ab);
    0, 0, 1, 0*m;
    0, 0, 0, 1*m
]
T_x_ab := [
    1, 0, 0, M_y_ab*L_ab^2/(2*E*I_ab) + F_x_ab*L_ab^3/(3*E*I_ab);
    0, 1, 0, 0*m;
    0, 0, 1, 0*m;
    0, 0, 0, 1*m
]
T_n_ab := [1, 0, 0, 0*m; 0, 1, 0, 0*m; 0, 0, 1, L_ab; 0, 0, 0, 1*m]
R_z_ab := [
    1, -(M_z_ab*L_ab/(J_ab*G) - M_mot*(L_ab/2)/(J_ab*G)), 0, 0*m;
    M_z_ab*L_ab/(J_ab*G) - M_mot*(L_ab/2)/(J_ab*G), 1, 0, 0*m;
    0, 0, 1, 0*m;
    0, 0, 0, 1*m
]
R_x_ab := [
    1, 0, 0, 0*m;
    0, 1, -(M_y_ab*L_ab/(E*I_ab) + F_x_ab*L_ab^2/(2*E*I_ab)), 0*m;
    0, M_y_ab*L_ab/(E*I_ab) + F_x_ab*L_ab^2/(2*E*I_ab), 1, 0*m;
    0, 0, 0, 1*m
]
R_y_ab := [
    1, 0, M_x_ab*L_ab/(E*I_ab) + F_y_ab*L_ab^2/(2*E*I_ab) + F_t*(L_ab/2)^2/(2*E*I_ab), 0*m;
    0, 1, 0, 0*m;
    -(M_x_ab*L_ab/(E*I_ab) + F_y_ab*L_ab^2/(2*E*I_ab) + F_t*(L_ab/2)^2/(2*E*I_ab)), 0, 1, 0*m;
    0, 0, 0, 1*m
]
T_ab := U_S*T_n_ab*U_S*T_x_ab*U_S*T_y_ab*U_S*T_z_ab
R_ab := U_S*R_x_ab*U_S*R_y_ab*U_S*R_z_ab
H_ab := T_ab*R_ab
# Summary Calculations
P_tool := [-D_part/2; 0; 0; 1]
P_tool_f := H_ab*H_bc*H_cd*H_de*H_ef*H_fp*P_tool = [-0.0125123 m; 2.81528e-5 m; 0.0684087 m; 1]
P_tool_0 := (U_S*T_n_ab*U_S*T_n_bc*U_S*T_n_cd*U_S*T_n_de*U_S*T_n_ef*U_S*T_n_fp*P_tool)
P_deflection := P_tool_f - P_tool_0 = [-12.3222; 28.1528; 8.69924; 0 1/m] μm
