# Tool Mount & Cross-Slide - HTMs
# Screws Carriage to Flexure - Characteristics
# Dimensions
d_thread := 0.25 in
TPI_thread := 20 1/in
P_thread := 1/TPI_thread
L_ls := 8 cm
# Properties
E_ls := 200 GPa
k_leadscrew := (π*(d_thread/2)^2)*E_ls/L_ls = 79.173 N/μm
# Leadscrew Characteristics
# Reference
# Left Hand: https://www.mcmaster.com/90036A229/
# Dimensions
d_thread := 0.25 in
TPI_thread := 20 1/in
P_thread := 1/TPI_thread
L_ls := 8 cm
# Properties
E_ls := 200 GPa
k_leadscrew := (π*(d_thread/2)^2)*E_ls/L_ls = 79.173 N/μm
# Leadscrew Bearings Characteristics (Thrust Ball Bearing)
# Reference
# https://www.mcmaster.com/6655K13/
# Bearing Dimensions
d_thread := 0.25 in
TPI_thread := 20 1/in
P_thread := 1/TPI_thread
L_ls := 8 cm
# Bearing Properties
k_bearing := 50 N/μm
# Leadscrew Bearings Characteristics (Needle-Roller Thrust Bearing)
# Reference
# Needle-Roller Thrust Bearing | Thick Washer
# https://www.mcmaster.com/5909K23/ | https://www.mcmaster.com/5909K231/
# Bearing Dimensions
d_thread := 0.25 in
TPI_thread := 20 1/in
P_thread := 1/TPI_thread
L_ls := 8 cm
# Bearing Properties
k_bearing := 50 N/μm
# Cross-Slide Characteristics
# Cross-Slide Dimensions
L_cs := 5 cm
e_cs := 1 in
P_thread := 1/TPI_thread
L_ls := 8 cm
# Bearing Properties
k_bearing := 50 N/μm
